# Программа интерполирования дальномерного профиля  распределеного объекта 13.05.07
# [reference: function_all.xmcd]
# Функции
# Выбирем количество отсчетов равное
N := 4096
# количество азмитуальных каналов
M := 256
# ИСХОДНЫЕ ДАННЫЕ
# Длительность пеленгационного импульса равняется, с
τ := 0.05*10^-6
# Импульсная мощность излучаемого сигнала, Вт
P := 50*10^3
# Коэффициент усиления антенной системы РЛС
G := 1000
# Длинна волны на которой работает прибрежная РЛС, м
λ := 0.03
# Удельная эффективная поверхность рассевания, дБ
σP := -40
раз(σP) = 0.0001
# Величина флуктуации ЭПР, дБ
ΔσP := 2
раз(ΔσP) = 1.58489
# УЭПР объектов катера, дБ
σT1 := -40
раз(σT1) = 0.0001
# танкера дБ
σT2 := -40
раз(σT2) = 0.0001
# Диапазон изменения ЭПР надводных объектов (60-70), дБ
ΔσT := 60
раз(ΔσT) = 1000000
# Расстояние между двумя соседними локальными
# источникими рассеяния,м
R[1] := 1
# Ширина диаграммы направленности, град
θ1 := 0.7
дБ(10^-5) = -50
# Ширина диаграммы направленности, рад
θ := θ1*π/180
θ = 0.0122173
θ2(θ) := θ*180/π  # градусы
# Скорость света в вакууме, м/с
c := 3*10^8
# Мертвая зона работы береговой РЛС, м
R[0] := 1000
дБ(255) = 24.0654
# Эелемент
дБ(1024) = 30.103
# -  разрешения по дальности, м
ΔR := c*τ/2
ΔR = 7.5
# -  разрешения по азимуту, м
ΔAmin := θ*R[0]
ΔAmin = 12.2173
ΔAmax := θ*(R[0] + N*ΔR)
ΔAmax = 387.533
R[0] + N*ΔR = 31720
# Вісота расположения антенны, м
H := 20
______________________________________________________________________
# 1. Построим дальномерный профиль радилокационного отражения
i := 1 .. N
Ppr(i, σ) := P*G^2*λ^2/(4*π)^3*10^(σ/10)*θ*c*τ/(4*(R[0] + R[1]*i)^3)
F3[i] := Ppr(i, σP)
r := 0 .. 210
T[r] := 1/5*sum(rnd(10), a = 1 .. 5)
e := 0 .. 200
T[e] := 1/10*sum(T[e + a], a = 0 .. 9)
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# Рис. 1 Дальномерный пеленгационный профиль
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# Изменение угла падения от дальности
αP(R) := θ2(asin(R/H))
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# Рис.2 Радиолокационный профиль цели
# Наложим на дальномерный профиль сигнал от цели
D := 3000  # - начало отраженного сигнала от цели
F := F3
F[D + e] := F3[D + e] + 0.2*T[e]*10^-9
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# 2 Запишем закон изменения ЭПР для локальных источников рассевания
# 2.1 Флуктуация ЭПР быстроменяющийся процесс
S[i] := ΔσP - rnd(2*ΔσP)
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F1[i] := Ppr(i, σP + S[i])
F1[D + e] := 0.4*T[e]*10^-9
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# Рис. 3 Радиолокационный профиль с наложенной целей
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# 2. Произведем выделение дальномерного профиля на участке N= 1000 до 1250
k := 1000 .. 1250
# Примем ширину окна усреднения
K := 50
F2[k] := 1/(2*K + 1)*sum(F1[k - K + t], t = 0 .. 2*K)
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CKO := sqrt(sum((F[k] - F2[k])^2, k))
CKO = 4.50676e-12
F2[k] := 1/(2*K + 1)*sum(F1[k - K + t], t = 0 .. 2*K)
r := 0 .. 125
s[r] := sqrt(sum((F[k] - (1/(2*r + 1)*sum(F1[k - r + t], t = 0 .. 2*r)))^2, k))
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# Из выше приведенного графика видно, что максимально точное выделение дальномерного профиля происходит при ширене окна усреднения +/- 140, однако есть смысл использовать ширину окна +/- 50 т.к. результат усреднения практически идентичен, но количество операций значительно меньше
# 3. Аппроксимируем усредненный дальноммерный профиль полиномами различной степени
# Востановление подстилающей морской поверхности аппроксимирующим полиномом четвертой степени
i := 1000 .. 1250
# 1 Вычислим коэффициенты полинома
A := [
    250, sum(i, i), sum(i^2, i), sum(i^3, i), sum(i^4, i);
    sum(i, i), sum(i^2, i), sum(i^3, i), sum(i^4, i), sum(i^5, i);
    sum(i^2, i), sum(i^3, i), sum(i^4, i), sum(i^5, i), sum(i^6, i);
    sum(i^3, i), sum(i^4, i), sum(i^5, i), sum(i^6, i), sum(i^7, i);
    sum(i^4, i), sum(i^5, i), sum(i^6, i), sum(i^7, i), sum(i^8, i)
]
B := [sum(F2[i], i); sum(i*F2[i], i); sum(i^2*F2[i], i); sum(i^3*F2[i], i); sum(i^4*F2[i], i)]
X := lsolve(A, B)
X = [5.35551e-17; 2.93371e-13; -6.87963e-16; 5.68344e-19; -1.60736e-22]
P[i] := X[0] + i*X[1] + i^2*X[2] + i^3*X[3] + i^4*X[3]
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CKO2 := sqrt(sum((P[i] - F2[i])^2, i))
CKO2 = 1.52569e-5
# Востановление подстилающей морской поверхности аппроксимирующим полиномом третьей степени
# 1 Вычислим коэффициенты полинома
A := [
    1250, sum(i, i), sum(i^2, i), sum(i^3, i);
    sum(i, i), sum(i^2, i), sum(i^3, i), sum(i^4, i);
    sum(i^2, i), sum(i^3, i), sum(i^4, i), sum(i^5, i);
    sum(i^3, i), sum(i^4, i), sum(i^4, i), sum(i^6, i)
]
B := [sum(F2[i], i); sum(i*F2[i], i); sum(i^2*F2[i], i); sum(i^3*F2[i], i)]
W := lsolve(A, B)
W = [1.69389e-16; 2.1712e-14; -5.01242e-22; -9.21817e-21]
P[i] := W[0] + i*W[1] + i^2*W[2] + i^3*W[3]
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CKO3 := sqrt(sum((P[i] - F2[i])^2, i))
CKO3 = 3.13773e-12
# Востановление подстилающей морской поверхности аппроксимирующим полиномом второй степени
# 1 Вычислим коэффициенты полинома
A := [
    1250, sum(i, i), sum(i^2, i);
    sum(i, i), sum(i^2, i), sum(i^3, i);
    sum(i^2, i), sum(i^3, i), sum(i^4, i)
]
B := [sum(F2[i], i); sum(i*F2[i], i); sum(i^2*F2[i], i)]
WW := lsolve(A, B)
WW = [1.24111e-16; 3.34087e-14; -2.08106e-17]
P[i] := WW[0] + i*WW[1] + i^2*WW[2]
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CKO4 := sqrt(sum((P[i] - F2[i])^2, i))
CKO4 = 2.46707e-12
# Востановление подстилающей морской поверхности аппроксимирующим полиномом первой  степени
# 1 Вычислим коэффициенты полинома
A := [250, sum(i, i); sum(i, i), sum(i^2, i)]
B := [sum(F2[i], i); sum(i*F2[i], i)]
X := lsolve(A, B)
X = [7.40719e-10; -6.45893e-13]
P[i] := X[0] + i*X[1]
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CKO5 := sqrt(sum((P[i] - F2[i])^2, i))
CKO5 = 7.27426e-10
# Как показал анализ СКО для аппроксимации полиномами различной степени, наиболее подходящим для этой цели подходит полином второй степени
# Применим полученный полином второй степени на весь промежуток наблюдения
i := 1 .. N
P[i] := WW[0] + WW[1]*i + WW[2]*i^2
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P[i] := |P[i] - F1[i]|
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