# 0. Функции и процедуры
# Функции и процедуры
# [reference: function_all.xmcd]
# Функции
# Коэффициент асимметрии задает степень асимметричности плотности вероятности относительно оси, проходящей через ее центр тяжести. Коэффициент асимметрии определяется третьим центральным моментом распределения. В любом симметричном распределении с нулевым математическим ожиданием, например, нормальным, все нечетные моменты, в том числе и третий, равны нулю, поэтому коэффициент асимметрии тоже равен нулю.
#
# Степень сглаженности плотности вероятности в окрестности главного максимума задается еще одной величиной —коэффициентом эксцесса. Он показывает, насколько острую вершину имеет плотность вероятности по сравнению с нормальным распределением. Если коэффициент эксцесса больше нуля, то распределение имеет более острую вершину, чем распределение Гаусса, если меньше нуля, то более плоскую.
# Для расчета коэффициентов асимметрии и эксцесса в Mathcad имеются две встроенные функции:
# ·  kurt (х) — коэффициент эксцесса (kurtosis) выборки случайных данных х;
# ·  skew(x) — коэффициент асимметрии (skewness) выборки случайных данных X.
# 1. Считывание изображений поверхности и изображений целей
ImagePov := READBMP("Images\Image_Pov2.bmp")
ImgY := rows(ImagePov)
ImgT := cols(ImagePov)
TargP := READBMP("Images\Targets_dis.bmp")
# [component: inputs TargP; outputs C0]
# t (дальность)
# Выбранные координаты сечения,
# исследуемые в дальнейшем
C0 =  # no stored result
x0 := C0[0]
y0 := C0[1]
# y
# (азимут)
# Рис. 1.1. Модель поверхности | Навигация по странице
ImgT =  # no stored result
ImgY =  # no stored result
# - Шумы
# - II. Классический алгоритм оптимальной обработки
N := 512
M := 256
# Полное моделировние сигнала, отраженного от ППО, с учетом заданой частоты излучения
# Дальность
t := 0 .. N - 1  # Азимут
y := 0 .. M - 1
x := t
PovD[y, x] := ImagePov[y, x]
# 2. Исходные данные
# Пусть заданы следующие исходные данные | Константы
# Морская миля
mile := 1.852*10^3  # м
# Частота излучаемого сигнала:
fo := 10*10^9
ωo := 1*fo
# Скорость света
cv := 3*10^8
cv := 299792458  # disabled
# Длина зондирующего импульса:
τ := 0.5*10^-7  # c
# Длина волны
λo := cv/ωo
λo =  # no stored result
# Период обзора:
Tp := 2*10^-4  # c
MaxT := Tp/τ
MaxT := 256
# Амплитуда сигнала:
MaxAz := 250
ko := 2*π/λo
cv*τ/2 =  # no stored result
Ampl := 255
# диаграмма направленности антенны по уровню -3 дБ:
Rmax := Tp*cv/2
Rmax =  # no stored result
# - ширина в азимутальной плоскости
AngleAz := 0.5
# В обозначениях P - протяженная цель
# Протяженность объекта по азимуту:
AzP := 18
8*mile =  # no stored result
# Протяженность объекта по дальности:
DistP := 10
# Направление прихода сигнала
-по*оси*X
θx := 0.523  # ->30 градусов
2*10^-4/10^-6 =  # no stored result
-по*оси*Y
θy := 0.5
# - расстояние между элементами антенной решетки | Длина антенны
λo*180/(θy*π) =  # no stored result
do := round(cv*τ/(2*sin(θx)))
DeltaR := cv*τ/2
do =  # no stored result
DeltaR =  # no stored result  # Длительность излучаемого сигнала
TauS := 5
# Отношение сигнал цели/аддитивный
# шум (на цели)
SNR := 200  # Протяженноть по дальности:
LOP := 5
# Удельная ЭПР поверхности
# [reference: Интерполяции морской поверхности.xmcd]
# Характеристики обнаружения
# -- затухание по дальности
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RT[t] := 10^4/(t + 1 + 100)^2
# 3. Формирование случайных процессов
# Количесвто элементов всего
Nmax := N*M
Nmax =  # no stored result
# 1. Белый ШУМ:
noise := rnorm(Nmax, 0, 1)
# 2. Формируем случайный процесс с плотностью распределения Рэлея:
# это нужно, т.к амплитуда результирующего сигнала сложной цели при наличии стабильно  отражающего элемента pacпределена по обобщенному  закону Релея.
noise2 := rnorm(2*Nmax, 0, 1)
mean(noise) =  # no stored result
mean(noise2) =  # no stored result
Var(noise) =  # no stored result
Var(noise2) =  # no stored result
NPmax := Nmax
Nr := 2*NPmax
i := 0 .. NPmax - 1
j := 0 .. Nr - 1
noiseN[j] := noise2[j]
noiseReley[i] := sqrt(noiseN[i]^2 + noiseN[i + NPmax]^2)
# Импульсная помеха
# - если отраж. ППО - белый шум,
# то включить эту формулу
noiseReley[i] := noiseN[i*2]
ImpNoise := rnorm(Nmax, 0, 255)
ImpNoise := N_U(ImpNoise)*255  # Сделаем среднее равным нулю
meanR := mean(noise)
rows(noiseReley) =  # no stored result
ImpNoise[i] := if(|ImpNoise[i]| ≤ 150, 0, |ImpNoise[i]|)
noiseReley := noiseReley - meanR
mean(noiseReley) =  # no stored result
Var(noiseReley) =  # no stored result
# 3. С равномерным распределением: | Сделаем дисперсию единичной, Рэлеевского случ. процесса:
Siggma := Var(noiseReley)
Siggma =  # no stored result
noiseReley[i] := noiseReley[i]/sqrt(Siggma)
j := 0 .. 99
max(noiseReley) =  # no stored result
# -Построим плотность вероятности Рэлеевского случайного процесса
# Усредние Плотности Вер ---->
P_Reley := PlontVer(noiseReley, 100)  # disabled
PlotTau := 5
PlotInterval := 1*PlotTau
tPlot := PlotTau .. rows(P_Reley) - PlotTau - 1
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P_Reley_Mean[tPlot] := 1/(PlotInterval + 1)*sum(P_Reley[tPlot + tt], tt = 0 .. PlotInterval)
kurt(noise) =  # no stored result
skew(noise) =  # no stored result
WRITEPRN("result\noiseReley.dat") := noiseReley  # disabled
noiseReley := READPRN("result\noiseReley.dat")  # disabled
# среднее | дисперсия | автокорреляционная функция шума
mean(noiseReley) =  # no stored result
Var(noiseReley) =  # no stored result
CC := correl(noiseReley, noiseReley)  # disabled
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n[t] := noiseReley[t]
# 3. Излучаемый сигнал s(t):
ts := 0 .. N - 1
s[ts] := 0
TauP := DistP
ts := 0 .. TauS - 1
s[ts] := 1
rows(s) =  # no stored result
cols(s) =  # no stored result
# Модель морской  поверхности
# 4. Анализируемое изображение + сечение
PovD_C := PovD
PovD_C[y0, t] := 255*0.6
PovD_C[y, x0] := 255*0.6
# УЭПР поверхности
# [component: inputs PovD_C]
# t
# y
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# Сечение УЭПР поверхности в дальномерной плоскости для выбраннойточки
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# Сечение УЭПР поверхности в азимутальной плоскости
β := 10
λ := 10
η := 0.08
α(y, β, η, λ) := β/(λ + η^6*y^6)
β := .005
λ := 10
η := 1
α(y, β, η, λ) := η*λ*e^(-β*y^2)
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# 5. Модели детерминированных протяженных объектов
III[y, t] := if(TargP[y, t] > 0, TargP[y, t], PovD[y, t])
# [component: inputs TargP]
# [component: inputs III]
t0 := 75
Tp := 52
uT[t] := III[y0, t]
MaxU := max(uT)
uT := uT/1
max(uT) =  # no stored result
# Порог наличия гидрометеора:
PH := 100
Fp[t] := (t - t0)^2*exp(-((t - t0)/Tp)^2)*uT[t]^1*0.1
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# Сечение УЭПР поверхности в дальномерной плоскости + цели
rect
Fp2[t] := (t - t0)*α(t - t0, β, η, λ)*10
Fp[t] := (t - t0)*rect(t, t0 - Tp/2, t0 + Tp/2)*1^1*20
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# 7. Принимаемый сигнал - свертка поверхности с зондирущим сигналом
widthP := 100
k := 0 .. widthP
Pulse1[k] := cos(ωo*10^-4*k)
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# Импульс (метры)
Lmax := ImgT - 15
l := 0 .. Lmax
# 5.а Принимаемый сигнал+Аддитивный шум
round(100/10) =  # no stored result
# форирование отражений от объектов
ImgT := □
TargN[y, t] := if(TargP[y, t] > 20, if(PovD[y, t] < PH, TargP[y, t], noiseReley[y*t]*1*2/sqrt(SNR)*PovD[y, t] + 0.6*TargP[y, t]), TargP[y, t])
# форирование отражений от поверхности
Ampl =  # no stored result
uOUT[y, l] := -100/(widthP + 1)*sum(III[y, l + round(k/10)]*Pulse1[k], k = 0 .. widthP)
SNR =  # no stored result
(Ampl/sqrt(SNR)) =  # no stored result
PovDN[y, t] := if(TargP[y, t] > 20, TargN[y, t], III[y, t]*2*noiseReley[y*t]/sqrt(SNR))  # Принимаемое РЛИ+аддитивный шум
uOUT := N_U(uOUT)*255
uOUT := shift(uOUT, -10)
uOUT := transpose(shift(transpose(uOUT), -5))  # disabled
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# Принимаемый сигнал без аддитивного шума
PovDN[y, t] := if(ImpNoise[t*y] > 150, ImpNoise[t*y], PovDN[y, t] + Ampl*1*noise[t*y]/sqrt(SNR))
# [component: inputs PovDN]
# [component: inputs PovDN]
# [component: inputs uOUT]
# Свертка - по быстрому преобразованию Фурье c прямоуг. имп
widthP := 2
Aver1[y, t] := 0
x1 := 0 .. widthP
l1 := 0 .. widthP
WRITEBMP("Result\PovDN.bmp") := PovDN
Aver1[x1, l1] := 1
l := Lmax .. 511
uOUT[y, l] := 0
Aver1f := cfft(Aver1)
ImF := cfft(uOUT)
uR[t] := PovDN[y0, t]
IPA1F[y, t] := Aver1f[y, t]*ImF[y, t]
IPA1 := icfft(IPA1F)
IPA1[y, t] := |IPA1[y, t]|
PovDFO := N_U(IPA1)*255
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LUo := 185
DL := 20
# [component: inputs PovDFO]
uk[y] := PovDN[y, x0]
lop[y] := III[y, x0]
y2 := 0 .. rows(uk) - DL
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rows(uk) - DL =  # no stored result
lop2(y, Yo) := if(y > Yo and y < Yo + DL, if(round(y/2) - y/2 == 0, 1, 1), 0)
uk2[y] := uk[y] - lop2(y, LUo)*200
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M =  # no stored result
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# корреляционная функция входного сигнала (энергия без полезного сигнала)
Rus1 := correl(uk, uk)  # disabled
Rus2 := correl(uk, uk2)  # disabled
FRAME =  # no stored result
ckoP[y2] := 1/N*sum((lop2(tau, y2)*uk[tau])^2, tau = 0 .. M - 2)
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ArgMin(ckoP)[0, 0] =  # no stored result
# 6. Сигнал после логарифмического усилителя
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PovDN[y, t] := |PovDN[y, t]|
uM[t] := PovDN[y0, t]
uM[t] := 20*ln(3*uR[t] + 1)  # disabled
max(uM) =  # no stored result
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# Спектры сигналов
# а) Излучаемого сигнала: | б) Принимаемого сигнала | в) УЭПР:
SW_P := cfft(uT*1)
SW := cfft(s*5)
UW := cfft(uM*1)
LOP := 4
mgBern := ImgBernul(III, 15, 185, 255)  # disabled
mgBern := 255*mgBern  # disabled
mgBern[x, y] := if(III[x, y] > 200, 255, 0)  # disabled
w := 0 .. rows(SW) - 1
rows(SW) =  # no stored result
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# [component: inputs mgBern; outputs LO]
# Спектры сигналов:
# ( SW - излучаемого сигнала, UW - принимаемого сигнала, SW_P - УЭПР)
LO =  # no stored result
mgBern[LO, 35] =  # no stored result
Por := 185
u1[y] := III[LO, y]
h := Bernuly(u1, 10, 188, 255)
# 7. Принимаемый сигнал - свертка поверхности с огибающей импульса
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widthP := 5
k := 0 .. widthP
Pulse1[k] := 1
exp(-(1/TauS*(k - (widthP + 1)/2))^2)  # disabled
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# Импульс (метры)
Lmax := ImgT - widthP - 1
l := 0 .. Lmax
uOUT[l] := 1/(widthP + 1)*sum(uM[l + k]*Pulse1[k], k = 0 .. widthP)
# Свертка - по быстрому преобразованию Фурье c прямоуг. имп
widthP =  # no stored result
Aver1[y, t] := 0
x1 := 0 .. widthP
l1 := 0 .. widthP
Aver1[x1, l1] := 1
exp(-(.5*(x1 - (widthP + 1)/2))^2)  # disabled  # Размерность спектра
Aver1f := cfft(Aver1)
ImF := cfft(PovDN)
rows(ImF) =  # no stored result
cols(ImF) =  # no stored result
IPA1F[y, t] := Aver1f[y, t]*ImF[y, t]
IPA1 := icfft(IPA1F)
IPA1[y, t] := |IPA1[y, t]|
PovDF := N_U(IPA1)*255
PovDF := IPA1  # disabled
PovDF := shift(PovDF, widthP - 2)
PovDF := transpose(shift(transpose(PovDF), widthP - 2))
# [component: inputs PovDF]
LUo := 185
DL := 15
uk[y] := PovDN[y, x0]
lop[y] := III[y, x0]
lop2[y] := if(y > LUo and y < LUo + DL, 200, 0)
uk2[y] := uk[y] - lop2[y]
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# Сечение по дальности
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# автокорреляционная функция шума
# Обработка по моему алгоритму
Rus1 := correl(uk, uk)
Rus2 := correl(uk, uk2)
# Параметры: порога обнаружения для одного сигнала и пачки, уровня шума и протяженности пачки
P0 := 40
Ptp := 60
LMean := -1
LNoise := 3
TPLength := 0
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WVS[x] := PovDF[y0, x]
WDET := WVDetectMy(WVS, P0, Ptp, LMean, LNoise, TPLength)
dMean := WDET[2]
dCKO := WDET[3]
SynthSig := WDET[0]
SynthNoise := WDET[1]
ImgSynth := WVDetectImg(PovDF, P0, Ptp, LMean, LNoise, TPLength, 0)
ImgSynth := medflt(ImgSynth, 3)  # disabled
ImgSynth := PorD(ImgSynth, 10)  # disabled  # - обнаружение объектов результат 1 или 0
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# До обработки
# Вероятность правильного обнаружения | Вероятность ложной тревоги | Вероятность пропуска объектов
D1 := Wpr(PorD(PovDF, P0), PorD(TargP, P0))
F1 := Wlt(PorD(PovDF, P0), PorD(TargP, P0))
DF1 := Wlp(PorD(PovDF, P0), PorD(TargP, P0))
D1 =  # no stored result
F1 =  # no stored result
DF1 =  # no stored result
1 - D1 =  # no stored result  # Вероятность правильного необнаружения
# После
Wtp(PorD(PovDF, P0), PorD(TargP, P0)) =  # no stored result
# Вероятность правильного обнаружения | Вероятность ложной тревоги | Вероятность пропуска объектов
LUo := 185
DL := 20
D2 := Wpr(PorD(ImgSynth, P0), PorD(TargP, P0))
F2 := Wlt(PorD(ImgSynth, P0), PorD(TargP, P0))
DF2 := Wlp(PorD(ImgSynth, P0), PorD(TargP, P0))
uk[y] := PovDN[y, x0]
lop[y] := III[y, x0]
y2 := 0 .. rows(uk) - DL
# Вероятность правильного необнаружения
D2 =  # no stored result
F2 =  # no stored result
DF2 =  # no stored result
1 - D2 =  # no stored result
rows(uk) - DL =  # no stored result
Wtp(PorD(ImgSynth, P0), PorD(TargP, P0)) =  # no stored result
# [component: inputs Cont_Image(ImgSynth, 50, 255)]
# [component: inputs Cont_Image(PorD(PovDF, P0), 50, 255)]
# [component: inputs Cont_Image(PovDF, 50, 255)]
lop2(y, Yo) := if(y > Yo and y < Yo + DL, if(round(y/2) - y/2 == 0, 1, 1), 0)
uk2[y] := uk[y] - lop2(y, LUo)*200
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M =  # no stored result
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# По минимуму отношений дисперсий на
Porg := 160  # - порог
LOP := 20
widthP =  # no stored result
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t2 := 0 .. N - 1 - LOP
N =  # no stored result
MeanSigm[y] := 1/N*sum(PovDF[y, tau], tau = 0 .. N - 1)
t3 := N - LOP .. N - 1
PovDF[y, t3] := Porg
# Инвертирование процесса
Sigma2_1[y, t] := sum((PovDF[y, tau] - rect(tau, t, t + LOP)*MeanSigm[y])^2, tau = 0 .. N - 1)  # disabled
t4 := 0 .. N - 20 - LOP
Sigma[y, t2] := sum((PovDF[y, tau]*1)^2*1, tau = t2 .. t2 + LOP)
MSigma := max(Sigma)
Sigma := MSigma - Sigma
# Линейное возрастание мощности отраженых сигналов
WRITEPRN("sigma2.txt") := Sigma2
PovD_Sigm := CONTUR(Sigma, LOP)
# По Бернули
Zanam[y, t] := sum((1*PovDF[y, tau])^2, tau = 0 .. N - 1)  # disabled
LinerP[y, t4] := 1/(LOP + 1)*sum((sum(PovDF[y, tr]^2, tr = tau .. tau + 5)/5 - sum(PovDF[y, tr]^2, tr = tau + 2 .. tau + 2 + 5)/5)^2, tau = t4 .. t4 + LOP)  # disabled
Sigma2[y, t] := Sigma2_1[y, t]/1
PovD_Bern := ImgBernul(PovDF, LOP, Porg, Ampl)
PovD_Sigm2 := CONTUR(Sigma2, LOP)
to := -10
# [component: inputs Cont_Image(PovDF, 0, 255); outputs YRM]
# [component: inputs PovD_Bern*255]
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# Результат свертки с импульсным сигналом
# Результат обработки с использованием  метода по Бернули
NS2 := N_U(Sigma2_1)
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# [component: inputs PovD_Sigm*255]
# [component: inputs Cont_Image(Sigma2, 0, 255)]
LinerP := Cont_Image(LinerP, 100, 255)
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# Результат обработки по 1- критерию
# (отношение дисперсий)
# Результат обработки по 1- критерию
# (отношение дисперсий)
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transpose(YRM) =  # no stored result
XR := YRM[0]
YR := YRM[1]
WVPovDF := WVTransIMG(PovDF, 8)
y0 =  # no stored result
otn[t] := Sigma2_1[y0, t]/Sigma3_1[y0, t]
y2 := 0 .. rows(WVPovDF) - 5
t2 := 0 .. cols(WVPovDF) - 10
cols(WVPovDF) =  # no stored result
SPovDF[y2, t] := WVPovDF[y2, t] + PovDF[y2 + 3, t]
FRAME
NSigma := 1 - N_U(Sigma)
NSigma2 := 1 - Sigma2
SPovDF[y2, t2] := WVPovDF[y2, t2] + PovDF[y2, t2 + 2]
NSigma := shift(NSigma, 0)  # disabled
NSigma2 := shift(NSigma2, 0)  # disabled
# [component: inputs LinerP]
rows(PovD) =  # no stored result
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RPovDF[y2, t] := WVPovDF[y2, t] - PovDF[y2 + 2, t]
# Сравнение результатов обработки для сечения YR
DPovD[y2, t] := sqrt(PovDF[y2, t]^2 - PovDF[y2 + 1, t]^2)/sqrt(PovDF[y2, t]^2 + PovDF[y2 + 1, t]^2)
# [component: inputs SPovDF]
# [component: inputs DPovD*255]
FRAME =  # no stored result
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RPovDF[y2, t] := |RPovDF[y2, t]|  # disabled
# [component: inputs RPovDF]
# [component: inputs PovDF]
PovDF := shift(PovDF, -6)
ln(0.999/10^-5) =  # no stored result
100*ln(0.999)/ln(10^-5) =  # no stored result
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t := x
m := 20
d := 15
sUM := 100*ln(0.999)/ln(10^-5)
# [component: inputs Cont_Image(PovDF, 155, 255)]
SRK[y, t] := if((y + m < M and y - m ≥ 0) and (t + d < N and t - d ≥ 0), PovDF[y, t]/((0/(m + 1)*|sum((PovDF[y - p, t] - PovDF[y + p + 1, t])^2, p = 0 .. m - 1)|)^(1/2) + (1/(d + 1)*|sum((PovDF[y, t - p]*1 - PovDF[y, t + p + 1])^2, p = 0 .. d - 1)|)^(1/2) + 10), 0)
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SRK[y, t] := SRK[y, t]*(1 - rect(t, 495, 600))
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SRK := N_U(SRK)*255
FRAME =  # no stored result
# [component: inputs Cont_Image(SRK + Targ*0.1, 55, 255)]
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# Суммарно разностный сигнал
# 8. Принимаемый сигнал - свертка поверхности с огибающей импульса
widthP := 7
k := 0 .. widthP
Pulse1[k] := exp(-(1/5*(k - (widthP + 1)/2))^2)
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# Импульс (метры)
Lmax := ImgT - widthP - 1
l := 0 .. Lmax
uOUT[l] := 1/(widthP + 1)*sum(uM[l + k]*Pulse1[k], k = 0 .. widthP)
y2 := 0 .. rows(PovDF) - 5
PovDN_S[y2, t] := PovDN[y2, t] + PovDN[y2 + 3, t]
# [component: inputs PovDN_S]
# Свертка - по быстрому преобразованию Фурье c прямоуг. имп
widthP =  # no stored result
Aver1[y, t] := 0
x1 := 0 .. widthP
l1 := 0 .. widthP
Aver1[x1, l1] := exp(-(.5*(x1 - (widthP + 1)/2))^2)
Aver1f := cfft(Aver1)
# Размерность спектра
ImF2 := cfft(PovDN_S)
rows(ImF) =  # no stored result
cols(ImF) =  # no stored result
IPA1F[y2, t] := Aver1f[y2, t]*ImF2[y2, t]
IPA1 := icfft(IPA1F)
IPA1[y2, t] := |IPA1[y2, t]|
PovDF_S := N_U(IPA1)*255
# Сечение по дальности
# [component: inputs PovDF_S]
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# Ненормированная одностороняя автокорреляционная функция | Нормированная двустороняя автокорреляционная функция
TauP =  # no stored result
tau := 0 .. 2*TauP
Ksi1[tau] := sum(s[tau + tt]*s[tt], tt = 0 .. TauP)
maxx := max(Ksi1)
Ksi1 := Ksi1/maxx
Ksi[tau] := if(tau ≥ TauP, Ksi1[tau - TauP], Ksi1[TauP - tau])
tau1 := -(2*TauP) .. 2*TauP
K(tau1) := Ksi[tau1 + TauP]
MaxT := cols(III)
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# Оптмальный алгоритм с декорреляцией
# полагаем входной процесс  суммой двух нормальных процессов
# Выражение для корреляционной функции принимаемого процесса
t := 0 .. N - 1
tau1 := t
t1 := t
t2 := t
SN := SNR
# сигнал в дискретной форме по времени и задержке
Sigma0[t] := s[t]*1  # disabled
s(t, tau1) := if(t - tau1 < 0, 0, s[t - tau1]*1)
Dap_OBR[t] := if(Dap_Full[X0 + L0, t] > 0, 1, 0)
Sigma0[x] := III[y0, x]*1
Sigma0[t] := sP[t]*F_VesO[t]*F_VesC[t]  # disabled
Ampl =  # no stored result
maxSig := max(Sigma0)
Sigma0 := Sigma0/maxSig  # disabled
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sd[t, tau1] := 1*s(t, tau1)
WRITEPRN("sd.dat") := sd  # disabled
sd := READPRN("sd.dat")  # disabled
Ru := 0
Ru[t1, t2] := sum(Sigma0[tau1]*sd[t1, tau1]*sd[t2, tau1]*(1 - rect(tau1, 60, 100)), tau1 = 0 .. MaxT - 1)
WRITEPRN("Ru.dat") := Ru
# Найдем обратно-корреляционную функцию
Ru := READPRN("Ru.dat")
Ru[t1, t1] := Ru[t1, t1] + SN
SN =  # no stored result
max(Ru) =  # no stored result
Wu := Ru^-1
max(Wu) =  # no stored result
WRITEPRN("Wu.dat") := Wu  # disabled
Wu2 := READPRN("Wu.dat")
# Новая автокорреляционная функция | Wu.dat - с белым шумом
tau2 := 0 .. 2*TauP
TauP =  # no stored result  # WuRel.dat - с Релеевским шумом
# Ru.dat - с белым шумом
Wu2 =  # no stored result
KsiW[tau2] := sum(sum(sd[t1, tau2]*Wu[t1, t2]*sd[t2, 0], t2), t1)
WRITEPRN("KsiW.dat") := KsiW  # disabled  # RuRel.dat - с Релеевским шумом
KsiW := READPRN("KsiW.dat")  # disabled
# - Классический алгоритм оптимальной обработки Ksi1
# - Декорреляция
KsiW2[tau2] := sum(sum(sd[t1, tau2]*Wu2[t1, t2]*sd[t2, 0], t2), t1)
# Нормировка двух автокорреляционных функций к 1
mKsiW := max(KsiW)
mKsiW =  # no stored result
KsiW := N_U(KsiW)
maxx := max(Ksi1)
Ksi1 := N_U(Ksi1)
Wu =  # no stored result
KKsiW := KSiW(III*255, sd, SN, MaxT, TauP, X0 + L0)  # disabled  # Нормированная двустороняя автокорреляционная функция
KsiW2 := N_U(KsiW2)
tt := 0 .. 4*TauP
kw[tt] := if(tt ≥ 2*TauP, KsiW[tt - 2*TauP], KsiW[2*TauP - tt])
# Ненормированная одностороняя автокорреляционная функция
tau1 := -20 .. 20
KW(tau1) := kw[tau1 + 2*TauP]
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KsiW2[tau2] - KsiW[tau2] =  # no stored result
EW := sum(KW(tau), tau = -TauP .. TauP)
EW =  # no stored result
u := 0
u[x] := PovDN[y0, x]
t := 0 .. MaxT - 1
Yw[t] := if(t ≥ TauP and t < MaxT - TauP, sum(u[t + tau]*KW(tau), tau = -TauP .. TauP), 0)
WRITEPRN("Yw2.dat") := Yw  # disabled
Yw2 := READPRN("yw.dat")  # disabled
# Оптмальный алгоритм с декорреляцией
# Как видно из рисунка эта оценка - с ярко выраженным "спекл-шумом" (красная линия)
# _Изме_(нить шум)
# _Изме_(нить Обратную матрицу)
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TauP := 20
Fp(t, t0) := exp(-2*((t - t0)/(1*TauP))^2)
tau1 := -20 .. 20
KWP(tau1) := kw[tau1 + 2*TauP]*Fp(tau1, 0)
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# Полностью изображение с декорреляцией
PovDFDec[y, t] := |if(t ≥ TauP and t < MaxT - TauP, sum(PovDN[y, t + tau]*KW(tau), tau = -TauP .. TauP), 0)|
PovDFDec := N_U(PovDFDec)*255
# Обработка по моему алгоритму
# Параметры: порога обнаружения для одного сигнала и пачки, уровня шума и протяженности пачки
P0 := 80
Ptp := 50
LMean := -1
LNoise := 2
TPLength := 0
WVS[x] := PovDFDec[y0, x]
WDET := WVDetectMy(WVS, P0, Ptp, LMean, LNoise, TPLength)
dMean := WDET[2]
dCKO := WDET[3]
SynthSig := WDET[0]
SynthNoise := WDET[1]
ImgSynth := WVDetectImg(PovDFDec, P0 - 20, Ptp, LMean, LNoise, TPLength, 0)
ImgSynth := medflt(ImgSynth, 3)  # disabled
ImgSynth := PorD(ImgSynth, 10)  # disabled  # - обнаружение объектов результат 1 или 0
# До обработки
# Вероятность правильного обнаружения | Вероятность ложной тревоги | Вероятность пропуска объектов
Ddc := Wpr(PorD(PovDFDec, P0), PorD(TargP, P0))
Fdc := Wlt(PorD(PovDFDec, P0), PorD(TargP, P0))
DFdc := Wlp(PorD(PovDFDec, P0), PorD(TargP, P0))
D1 =  # no stored result
Ddc =  # no stored result
F1 =  # no stored result
Fdc =  # no stored result
DF1 =  # no stored result
1 - D1 =  # no stored result  # Вероятность правильного необнаружения
# После
Wtp(PorD(PovDFDec, P0), PorD(TargP, P0)) =  # no stored result
# Вероятность правильного обнаружения | Вероятность ложной тревоги | Вероятность пропуска объектов
Ddc := Wpr(PorD(ImgSynth, P0 - 20), PorD(TargP, P0))
Fdc := Wlt(PorD(ImgSynth, P0 - 20), PorD(TargP, P0))
DFdc := Wlp(PorD(ImgSynth, P0), PorD(TargP, P0))
D2 =  # no stored result
Ddc =  # no stored result
F2 =  # no stored result
Fdc =  # no stored result
DF2 =  # no stored result
DFdc =  # no stored result  # Вероятность правильного необнаружения
Wtp(PorD(ImgSynth, P0), PorD(TargP, P0)) =  # no stored result
1 - Ddc =  # no stored result
# [component: inputs Cont_Image(PorD(ImgSynth, P0), 50, 255)]
# [component: inputs Cont_Image(PorD(PovDFDec, P0), 50, 255)]
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P0i := 0 .. 255
# Вероятность правильного обнаружения | Вероятность ложной тревоги
D1[P0i] := Wpr(PorD(PovDFDec, P0i), PorD(TargP, P0))
F1[P0i] := Wlt(PorD(PovDFDec, P0i), PorD(TargP, P0))
D2[P0i] := Wpr(PorD(WVDetectImg(PovDFDec, P0i, Ptp, LMean, LNoise, TPLength, 0), P0i), PorD(TargP, P0))
F2[P0i] := Wlt(PorD(WVDetectImg(PovDFDec, P0i, Ptp, LMean, LNoise, TPLength, 0), P0i), PorD(TargP, P0))
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Ptp := 40
LMean := 1
LNoise := 3
D2[P0i] := Wpr(PorD(WVDetectImg(PovDFDec, P0i, Ptp, LMean, LNoise, TPLength, 0), P0i), PorD(TargP, P0))
F2[P0i] := Wlt(PorD(WVDetectImg(PovDFDec, P0i, Ptp, LMean, LNoise, TPLength, 0), P0i), PorD(TargP, P0))
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